<Lems>
  <DefaultRun component="curvetooth"/>

  <Dimension name="voltage" m="1" l="2" t="-3" i="-1"/>
  <Dimension name="voltage_gradient" m="1" l="2" t="-4" i="-1"/>
  <Dimension name="none"/>

  <Unit symbol="V" dimension="voltage"/>
  <Unit symbol="V_per_t" dimension="voltage_gradient"/>

  <!--
  <ComponentType name="CT1">
    <Parameter name="a" dimension="voltage"/>
    <Parameter name="b" dimension="voltage_gradient"/>
  </ComponentType>

  <ComponentType name="CT2" extends="CT1">
    <Parameter name="c" dimension="voltage"/>
  </ComponentType>

  <ComponentType name="CT3" extends="CT2">
    <Fixed parameter="c" value="1V"/>
  </ComponentType>

  <CT1 id="ct11" a="1" b="2" c="3"/>
  -->

  <ComponentType name="CurvetoothGenerator">
    <Parameter name="k" dimension="none"/>
    <Parameter name="threshold" dimension="voltage"/>
    <Exposure name="v" dimension="voltage"/>
    <Behavior>
      <StateVariable name="v" exposure="v" dimension="voltage"/>
      <TimeDerivative variable="v" value="1-95*v/100"/>
      <OnCondition test="v .gt. threshold">
	<StateAssignment variable="v" value="0"/>
      </OnCondition>
    </Behavior>
  </ComponentType>

  <CurvetoothGenerator id="ctgen"
		       k="1"
		       threshold="1 V"/>

  <Include file="SimpleSimulation.xml"/>
  <Unit symbol="s" dimension="time"/>
  <Dimension name="time" t="1"/>

  <Simulation id="curvetooth" length="10000s" step="0.01s" target="ctgen">
    <Display id="d0" timeScale="10s" title="Curvetooth waveform">
      <Line id="V" quantity="v" scale="1s" color="#ff0000"/>
    </Display>
  </Simulation>
</Lems>
