<Lems>

<Target component="simset"/>

<Include file="ex2dims.xml"/>
<Include file="hhchannel.xml"/>

<Include file="hhcell.xml"/>
<Include file="spikegenerators.xml"/>
<Include file="hhmodels.xml"/>
<Include file="misciaf.xml"/>

<Include file="SimpleNetwork.xml"/>

<HHCell id="hhcell_1" capacitance="1pF" injection="4pA" v0="-60mV">
    <ChannelPopulation channel="na" number="6000" erev="50mV"/>
    <ChannelPopulation channel="k" number="1800" erev="-77mV"/>
</HHCell>

<Component id="gen1" type="spikeGenerator" period="30ms"/>

<Component id="gen2" type="spikeGenerator2" period="32ms"/>

<Component id="iaf3cpt" type="iaf3" leakReversal="-50mV" deltaV="50mV" threshold="-30mV" leakConductance="50pS"
refractoryPeriod="4ms" capacitance="1pF"/>

<Network id="net1">
    <Population id="p1" component="gen1" size="1"/>
    <Population id="p2" component="gen2" size="1"/>
    <Population id="p3" component="iaf3cpt" size="1"/>

    <Population id="hhpop" component="hhcell_1" size="1"/>

    <EventConnectivity id="p1-p3" source="p1" target="p3">
        <Connections type="AllAll"/>
    </EventConnectivity>
</Network>

<Include file="MultiRunSimulation.xml"/>

<SimulationSet id="simset">
	<Display id="disp1" title="Flattening" xmin="0" xmax="80" ymin="-80" ymax="50"/>

	<Simulation id="sim" length="200ms" step="0.05ms" target="net1" display="disp1">
       	   <Meta for="jlems" method="eulerTree"/>
       	   	<DisplayList timeScale="1ms" title="Euler Tree">
	        	<Line id="p0v-a" quantity="hhpop[0]/v" scale="1mV" timeScale="1ms" color="#ff4040"/>
       	   	</DisplayList>
 	</Simulation>

 	  <Simulation id="sim" length="200ms" step="0.05ms" target="net1" display="disp1">
       	   <Meta for="jlems" method="rk4"/>
	       <DisplayList timeScale="1ms" title="RK4">
        		<Line id="p0v-a" quantity="hhpop[0]/v" scale="1mV" timeScale="1ms" color="#40ff40"/>
        	</DisplayList>
 	</Simulation>

 	 <Simulation id="sim" length="200ms" step="0.05ms" target="net1" display="disp1">
       	   <Meta for="jlems" method="eulerTree" preFlatten="na"/>
        	 <DisplayList timeScale="1ms" title="Na Component Flattened">
	        	<Line id="p0v-a" quantity="hhpop[0]/v" scale="1mV" timeScale="1ms" color="#4040ff"/>
	        </DisplayList>
 	</Simulation>

 </SimulationSet>

</Lems>
